cosP := 1
m := [-634, 428; -761, 305; -267, 654]
cosR := 1
sinP := -0.049
sinR := -0.012
scale(x, i) := (x - m[i, 0])/(m[i, 1] - m[i, 0])*2 - 1
scale(-122, 0) = -0.0357815
scale(-331, 1) = -0.193246
mx := -116
scale(-324, 2) = -1.12378
my := -321
mz := -315
Magx := 10*scale(mx, 0)
Magx = -0.244821
Magy := 10*scale(my, 1)
Magy = -1.74484
Magz := 10*scale(mz, 2)
Magz = -11.0423
maxcomp := Magx*cosP + Magz*sinP
maycomp := Magx*sinR*sinP + Magy*cosR - Magz*sinR*cosP
maxcomp = 0.296254
maycomp = -1.87749
t := maycomp/maxcomp
t = -6.33745
ang := atan(t)
ang = -1.41429
angD := 180/π*ang
angD = -81.0331
ax := 944
ay := 272
az := 17376
a := ax^2
a = 891136
b := ay^2
b = 73984
c := az^2
c = 301925376
cdf := a + b + c
cdf = 302890496
q := sqrt(cdf)
q = 17403.7
